clear
set defaultbasefrequency=60
new object=circuit.lehigh basekv=115 pu=1.0001 phases=3 bus1=sourcebus angle=30 mvasc3=20000 mvasc1=21000
edit object=vsource.source basekv=115 bus1=sourcebus.1.2.3 pu=1.00 r1=0 x1=0.0001 r0=0 x0=0.0001
new object=vsource.secondsource basekv=4.16 bus1=680.1.2.3 pu=1.00 r1=0 x1=0.0001 r0=0 x0=0.0001
new object=transformer.sub phases=3 windings=2 xhl=0.008 buses=[sourcebus.1.2.3,650.1.2.3] conns=[delta,wye] kvs=[115,4.16] kvas=[5000,5000] %rs=[0.0005,0.0005]
new object=loadshape.diesel_675_existing_shape npts=24 interval=1 useactual=no mult=[0.0,0.0,0.0,0.0,0.0,0.0,0.0,0.0,0.0,0.0,0.0,0.0,0.0,0.0,0.0,0.0,0.0,0.0,0.0,0.0,0.0,0.0,0.0,0.0]
new object=loadshape.solar_634_existing_shape npts=24 interval=1 useactual=no mult=[0.0,0.0,0.0,0.0,0.0,0.0,0.0,0.0,0.01177800256437076,0.03571102002284214,0.050409745295806864,0.15490424745472425,0.03552238175835221,0.08301140434556513,0.12418712165511528,0.13370384283885686,0.06680489395293095,0.0044285078282634074,0.0,0.0,0.0,0.0,0.0,0.0]
new object=loadshape.670c_residential2_shape npts=24 interval=1 useactual=yes mult=[18.97864344,17.35795841,17.0129319,16.89293897,18.95710465,23.34621152,28.40798431,25.83088316,22.85587618,20.22639518,17.34313098,17.4373398,17.29393513,16.86525069,16.71803771,18.01567204,25.21350014,35.28494681,40.71475204,39.76648321,39.3628337,34.34391999,28.39072205,23.49395516]
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new object=loadshape.670b_residential2_shape npts=24 interval=1 useactual=yes mult=[9.941194189,9.092263929,8.911535758,8.848682315,9.929911963,12.22896794,14.88037273,13.53046261,11.97212562,10.59477843,9.08449718,9.133844658,9.058727927,8.834178932,8.757067371,9.436780588,13.2070715,18.48259119,21.32677488,20.83006263,20.61862718,17.98967237,14.8713306,12.30635747]
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new object=loadshape.670a_residential2_shape npts=24 interval=1 useactual=yes mult=[2.711234778,2.479708345,2.430418843,2.413276995,2.708157808,3.335173075,4.058283473,3.690126165,3.265125169,2.889485025,2.477590141,2.491048543,2.470562162,2.409321527,2.388291101,2.573667434,3.601928592,5.040706688,5.816393149,5.680926173,5.623261958,4.906274284,4.055817435,3.356279309]
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new object=loadshape.652_residential_shape npts=24 interval=1 useactual=yes mult=[20.7861333,19.01109731,18.63321113,18.50179029,20.76254319,25.56966024,31.11350662,28.29096726,25.03262629,22.15271853,18.99485774,19.09803883,18.94097657,18.47146504,18.31023177,19.73145033,27.61478587,38.64541793,44.59234747,43.55376731,43.11167501,37.61476952,31.09460035,25.7314747]
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new object=loadshape.611_runway_shape npts=24 interval=1 useactual=yes mult=[48.60427995,51.57608556,44.96393543,43.6071395,44.02403735,47.66907666,71.63600823,76.46836135,105.6643563,90.75791073,64.12903006,60.10230386,59.89526338,59.99009825,59.82437196,59.48775512,62.37364598,75.43221996,103.5723553,108.7281799,114.7408046,111.4666541,85.67344709,54.98920197]
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new object=loadshape.675c_residential1_shape npts=24 interval=1 useactual=yes mult=[43.37975645,39.67533352,38.88670148,38.61243191,43.33052492,53.36276919,64.93253556,59.04201863,52.2420027,46.2317604,39.64144225,39.85677668,39.52899458,38.54914442,38.21265761,41.17867894,57.63085747,80.651307,93.06229038,90.89481876,89.97219132,78.50038854,64.89307896,53.70046895]
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new object=loadshape.675b_residential1_shape npts=24 interval=1 useactual=yes mult=[10.84493911,9.918833379,9.721675371,9.653107979,10.83263123,13.3406923,16.23313389,14.76050466,13.06050068,11.5579401,9.910360562,9.96419417,9.882248645,9.637286106,9.553164404,10.29466974,14.40771437,20.16282675,23.2655726,22.72370469,22.49304783,19.62509714,16.22326974,13.42511724]
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new object=loadshape.675a_hospital_shape npts=24 interval=1 useactual=yes mult=[159.023675,160.9194375,162.9458125,163.4360125,171.4727125,170.579925,194.715825,196.1332125,214.3329625,212.152325,214.014225,214.8586375,213.6503375,211.4971125,212.1001875,212.2523,205.9705375,194.4422375,184.2722,182.8214875,172.781525,171.7205,163.1764,163.282825]
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new object=loadshape.692_warehouse2_shape npts=24 interval=1 useactual=yes mult=[33.699,32.89233333,32.89233333,32.89233333,32.89233333,32.89233333,32.89233333,13.1,9.141666667,9.141666667,9.141666667,9.141666667,9.141666667,9.141666667,9.141666667,9.141666667,9.141666667,21.017,32.89233333,32.89233333,32.89233333,32.92833333,34.41233333,35.19066667]
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new object=loadshape.646_office_shape npts=24 interval=1 useactual=yes mult=[29.11833872,29.11833872,29.11833872,29.11833872,29.11833872,29.11833872,29.11833872,17.77832471,15.51038129,15.51038129,15.51038129,15.51038129,15.51038129,15.51038129,15.51038129,15.51038129,15.51038129,22.31421155,29.11833872,29.11833872,29.11833872,29.11833872,29.11833872,29.11833872]
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new object=loadshape.645_hangar_shape npts=24 interval=1 useactual=yes mult=[33.699,32.89233333,32.89233333,32.89233333,32.89233333,32.89233333,32.89233333,13.1,9.141666667,9.141666667,9.141666667,9.141666667,9.141666667,9.141666667,9.141666667,9.141666667,9.141666667,21.017,32.89233333,32.89233333,32.89233333,32.92833333,34.41233333,35.19066667]
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new object=loadshape.634c_atc_tower_shape npts=24 interval=1 useactual=yes mult=[12.91677778,13.59177778,13.79744444,13.87977778,14.76244444,14.65966667,18.78311111,19.06688889,22.32755556,20.12022222,24.96077778,27.50533333,30.364,30.39033333,29.73711111,29.30011111,29.10955556,25.57766667,25.59622222,24.03911111,22.44044444,19.76766667,12.68455556,15.93011111]
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new object=loadshape.634b_radar_shape npts=24 interval=1 useactual=yes mult=[31.13513143,32.76217914,33.25792651,33.45638616,35.58400213,35.33626236,45.27558212,45.95961173,53.81925653,48.49860964,60.16648347,66.29998464,73.19063213,73.25410708,71.67955342,70.62619068,70.16686775,61.65345777,61.69818485,57.9448603,54.09136853,47.64879526,30.57537345,38.3985938]
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new object=loadshape.634a_data_center_shape npts=24 interval=1 useactual=yes mult=[38.75033333,40.77533333,41.39233333,41.63933333,44.28733333,43.979,56.34933333,57.20066667,66.98266667,60.36066667,74.88233333,82.516,91.092,91.171,89.21133333,87.90033333,87.32866667,76.733,76.78866667,72.11733333,67.32133333,59.303,38.05366667,47.79033333]
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new object=loadshape.671_command_center_shape npts=24 interval=1 useactual=yes mult=[295.858,299.385,303.155,304.067,319.019,317.358,362.262,364.899,398.759,394.702,398.166,399.737,397.489,393.483,394.605,394.888,383.201,361.753,342.832,340.133,321.454,319.48,303.584,303.782]
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new object=transformer.reg1 phases=1 bank=reg1 xhl=0.01 kvas=[1666,1666] buses=[650.1,rg60.1] kvs=[2.4,2.4] %loadloss=0.01
new object=regcontrol.reg1 transformer=reg1 winding=2 vreg=121 band=2 ptratio=20 ctprim=700 r=3 x=9
new object=transformer.reg2 phases=1 bank=reg1 xhl=0.01 kvas=[1666,1666] buses=[650.2,rg60.2] kvs=[2.4,2.4] %loadloss=0.01
new object=regcontrol.reg2 transformer=reg2 winding=2 vreg=121 band=2 ptratio=20 ctprim=700 r=3 x=9
new object=transformer.reg3 phases=1 bank=reg1 xhl=0.01 kvas=[1666,1666] buses=[650.3,rg60.3] kvs=[2.4,2.4] %loadloss=0.01
new object=regcontrol.reg3 transformer=reg3 winding=2 vreg=121 band=2 ptratio=20 ctprim=700 r=3 x=9
new object=transformer.xfm1 phases=3 windings=2 xhl=2 buses=[633.1.2.3,634.1.2.3] conns=[wye,wye] kvs=[4.16,0.480] kvas=[500,500] %rs=[0.55,0.55] xht=1 xlt=1
new object=linecode.mtx601 nphases=3 basefreq=60 rmatrix=[0.3465|0.1560,0.3375|0.1580,0.1535,0.3414] xmatrix=[1.0179|0.5017,1.0478|0.4236,0.3849,1.0348] units=mi
new object=linecode.mtx602 nphases=3 basefreq=60 rmatrix=[0.7526|0.1580,0.7475|0.1560,0.1535,0.7436] xmatrix=[1.1814|0.4236,1.1983|0.5017,0.3849,1.2112] units=mi
new object=linecode.mtx603 nphases=2 basefreq=60 rmatrix=[1.3238|0.2066,1.3294] xmatrix=[1.3569|0.4591,1.3471] units=mi
new object=linecode.mtx604 nphases=2 basefreq=60 rmatrix=[1.3238|0.2066,1.3294] xmatrix=[1.3569|0.4591,1.3471] units=mi
new object=linecode.mtx605 nphases=1 basefreq=60 rmatrix=[1.3292] xmatrix=[1.3475] units=mi
new object=linecode.mtx606 nphases=3 units=mi rmatrix=[0.791721|0.318476,0.781649|0.28345,0.318476,0.791721] xmatrix=[0.438352|0.0276838,0.396697|-0.0184204,0.0276838,0.438352] cmatrix=[383.948|0,383.948|0,0,383.948]
new object=linecode.mtx607 nphases=1 basefreq=60 rmatrix=[1.3425] xmatrix=[0.5124] cmatrix=[236] units=mi
new object=load.671_command_center bus1=671.1.2.3 phases=3 conn=delta model=1 kv=2.4 kw=1155 kvar=660 daily=671_command_center_shape
new object=load.634a_data_center bus1=634.1 phases=1 conn=wye model=1 kv=0.277 kw=160 kvar=110 daily=634a_data_center_shape
new object=load.634b_radar bus1=634.1 phases=1 conn=wye model=1 kv=0.277 kw=120 kvar=90 daily=634b_radar_shape
new object=load.634c_atc_tower bus1=634.1 phases=1 conn=wye model=1 kv=0.277 kw=120 kvar=90 daily=634c_atc_tower_shape
new object=load.645_hangar bus1=645.2 phases=1 conn=wye model=1 kv=2.4 kw=170 kvar=125 daily=645_hangar_shape
new object=load.646_office bus1=646.2 phases=1 conn=delta model=2 kv=2.4 kw=230 kvar=132 daily=646_office_shape
new object=load.692_warehouse2 bus1=692.1.2.3 phases=3 conn=delta model=5 kv=2.4 kw=170 kvar=151 daily=692_warehouse2_shape
new object=load.675a_hospital bus1=675.1.2.3 phases=3 conn=wye model=1 kv=2.4 kw=485 kvar=190 daily=675a_hospital_shape
new object=load.675b_residential1 bus1=675.1.2.3 phases=3 conn=wye model=1 kv=2.4 kw=68 kvar=60 daily=675b_residential1_shape
new object=load.675c_residential1 bus1=675.1.2.3 phases=3 conn=wye model=1 kv=2.4 kw=290 kvar=212 daily=675c_residential1_shape
new object=load.611_runway bus1=611.3 phases=1 conn=wye model=5 kv=2.4 kw=170 kvar=80 daily=611_runway_shape
new object=load.652_residential bus1=652.3 phases=1 conn=wye model=2 kv=2.4 kw=128 kvar=86 daily=652_residential_shape
new object=load.670a_residential2 bus1=670.1 phases=1 conn=wye model=1 kv=2.4 kw=17 kvar=10 daily=670a_residential2_shape
new object=load.670b_residential2 bus1=670.2 phases=1 conn=wye model=1 kv=2.4 kw=66 kvar=38 daily=670b_residential2_shape
new object=load.670c_residential2 bus1=670.3 phases=1 conn=wye model=1 kv=2.4 kw=117 kvar=68 daily=670c_residential2_shape
new object=capacitor.cap1 bus1=675 phases=3 kvar=600 kv=4.16
new object=capacitor.cap2 bus1=611.3 phases=1 kvar=100 kv=2.4
new object=line.670671 phases=3 bus1=670.1.2.3 bus2=671.1.2.3 linecode=mtx601 length=1333 units=ft
new object=line.645646 phases=1 bus1=645.2 bus2=646.2 linecode=mtx603 length=300 units=ft
new object=line.692675 phases=3 bus1=692.1.2.3 bus2=675.1.2.3 linecode=mtx606 length=500 units=ft
new object=line.684611 phases=1 bus1=684.3 bus2=611.3 linecode=mtx605 length=300 units=ft
new object=line.684652 phases=1 bus1=684.3 bus2=652.3 linecode=mtx607 length=800 units=ft
new object=line.671692 phases=3 bus1=671.1.2.3 bus2=692.1.2.3 switch=y r1=1e-4 r0=1e-4 x1=0.000 x0=0.000 c1=0.000 c0=0.000
new object=line.632633 phases=1 bus1=632.1 bus2=633.1 switch=y linecode=mtx602 length=500 units=ft
new object=line.671684 phases=1 bus1=671.3 bus2=684.3 switch=y linecode=mtx604 length=300 units=ft
new object=line.632645 phases=1 bus1=632.2 bus2=645.2 switch=y linecode=mtx603 length=500 units=ft
new object=line.632670 phases=3 bus1=632.1.2.3 bus2=670.1.2.3 switch=y linecode=mtx601 length=667 units=ft
new object=line.650632 phases=3 bus1=rg60.1.2.3 bus2=632.1.2.3 switch=y linecode=mtx601 length=2000 units=ft
new object=line.671680 phases=3 bus1=671.1.2.3 bus2=680.1.2.3 switch=y linecode=mtx601 length=1000 units=ft
open object=line.671680 term=1
makebuslist
setbusxy bus=sourcebus y=30.285013 x=-84.071493
setbusxy bus=650 y=30.285013 x=-84.071993
setbusxy bus=rg60 y=30.285013 x=-84.072493
setbusxy bus=646 y=30.283013 x=-84.072993
setbusxy bus=645 y=30.284013 x=-84.072993
setbusxy bus=632 y=30.285013 x=-84.072993
setbusxy bus=633 y=30.286513 x=-84.072993
setbusxy bus=634 y=30.287013 x=-84.072993
setbusxy bus=670 y=30.285013 x=-84.073493
setbusxy bus=611 y=30.283013 x=-84.074493
setbusxy bus=684 y=30.284013 x=-84.074493
setbusxy bus=671 y=30.285013 x=-84.074493
setbusxy bus=692 y=30.285513 x=-84.074493
setbusxy bus=675 y=30.287013 x=-84.074493
setbusxy bus=652 y=30.284013 x=-84.075493
setbusxy bus=680 y=30.285013 x=-84.075493
set voltagebases=[115,4.16,0.48]
calcvoltagebases
new object=loadshape.wind npts=24 interval=1 useactual=yes mult=[3.067840221281998,1.7066091466187023,0.5740658631288211,0.5182074122977395,0.8160986297708724,3.6536653048111423,11.05419389275223,15.189716311189434,15.647229783549573,14.800583737681885,14.040724506837309,13.279133577271622,12.838799893226902,11.250575776582817,10.535085346347316,12.950642402594331,13.800274703711093,13.090580940515185,12.295364416781895,11.097871427938255,10.589867265047786,8.155612099087064,3.0982495532647865,2.3976711409031397]
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new object=generator.wind_sourcebus_0 bus=sourcebus.1.2.3 kva=15.6 pf=1.0 conn=delta duty=wind model=1
new object=generator.wind_sourcebus_1 bus=sourcebus.1.2.3 kva=15.6 pf=1.0 conn=delta duty=wind model=1
new object=generator.wind_650_0 bus=650.1.2.3 kva=15.6 pf=1.0 conn=delta duty=wind model=1
new object=generator.wind_650_1 bus=650.1.2.3 kva=15.6 pf=1.0 conn=delta duty=wind model=1
new object=generator.wind_rg60_0 bus=rg60.1.2.3 kva=15.6 pf=1.0 conn=delta duty=wind model=1
new object=generator.wind_rg60_1 bus=rg60.1.2.3 kva=15.6 pf=1.0 conn=delta duty=wind model=1
new object=generator.wind_646_0 bus=646.1.2.3 kva=15.6 pf=1.0 conn=delta duty=wind model=1
new object=generator.wind_646_1 bus=646.1.2.3 kva=15.6 pf=1.0 conn=delta duty=wind model=1
new object=generator.wind_645_0 bus=645.1.2.3 kva=15.6 pf=1.0 conn=delta duty=wind model=1
new object=generator.wind_645_1 bus=645.1.2.3 kva=15.6 pf=1.0 conn=delta duty=wind model=1
new object=generator.wind_632_0 bus=632.1.2.3 kva=15.6 pf=1.0 conn=delta duty=wind model=1
new object=generator.wind_632_1 bus=632.1.2.3 kva=15.6 pf=1.0 conn=delta duty=wind model=1
new object=generator.wind_633_0 bus=633.1.2.3 kva=15.6 pf=1.0 conn=delta duty=wind model=1
new object=generator.wind_633_1 bus=633.1.2.3 kva=15.6 pf=1.0 conn=delta duty=wind model=1
new object=generator.wind_634_0 bus=634.1.2.3 kva=15.6 pf=1.0 conn=delta duty=wind model=1
new object=generator.wind_634_1 bus=634.1.2.3 kva=15.6 pf=1.0 conn=delta duty=wind model=1
new object=generator.wind_670_0 bus=670.1.2.3 kva=15.6 pf=1.0 conn=delta duty=wind model=1
new object=generator.wind_670_1 bus=670.1.2.3 kva=15.6 pf=1.0 conn=delta duty=wind model=1
new object=generator.wind_611_0 bus=611.1.2.3 kva=15.6 pf=1.0 conn=delta duty=wind model=1
new object=generator.wind_611_1 bus=611.1.2.3 kva=15.6 pf=1.0 conn=delta duty=wind model=1
new object=generator.wind_684_0 bus=684.1.2.3 kva=15.6 pf=1.0 conn=delta duty=wind model=1
new object=generator.wind_684_1 bus=684.1.2.3 kva=15.6 pf=1.0 conn=delta duty=wind model=1
new object=generator.wind_671_0 bus=671.1.2.3 kva=15.6 pf=1.0 conn=delta duty=wind model=1
new object=generator.wind_671_1 bus=671.1.2.3 kva=15.6 pf=1.0 conn=delta duty=wind model=1
new object=generator.wind_692_0 bus=692.1.2.3 kva=15.6 pf=1.0 conn=delta duty=wind model=1
new object=generator.wind_692_1 bus=692.1.2.3 kva=15.6 pf=1.0 conn=delta duty=wind model=1
new object=generator.wind_675_0 bus=675.1.2.3 kva=15.6 pf=1.0 conn=delta duty=wind model=1
new object=generator.wind_675_1 bus=675.1.2.3 kva=15.6 pf=1.0 conn=delta duty=wind model=1
new object=generator.wind_652_0 bus=652.1.2.3 kva=15.6 pf=1.0 conn=delta duty=wind model=1
new object=generator.wind_652_1 bus=652.1.2.3 kva=15.6 pf=1.0 conn=delta duty=wind model=1
new object=generator.wind_680_0 bus=680.1.2.3 kva=15.6 pf=1.0 conn=delta duty=wind model=1
new object=generator.wind_680_1 bus=680.1.2.3 kva=15.6 pf=1.0 conn=delta duty=wind model=1
new object=monitor.m1 element=load.671_command_center terminal=1
new object=monitor.load.671_command_center element=load.671_command_center terminal=1
new object=monitor.load.634a_data_center element=load.634a_data_center terminal=1
new object=monitor.load.634b_radar element=load.634b_radar terminal=1
new object=monitor.load.634c_atc_tower element=load.634c_atc_tower terminal=1
new object=monitor.load.645_hangar element=load.645_hangar terminal=1
new object=monitor.load.646_office element=load.646_office terminal=1
new object=monitor.load.692_warehouse2 element=load.692_warehouse2 terminal=1
new object=monitor.load.675a_hospital element=load.675a_hospital terminal=1
new object=monitor.load.675b_residential1 element=load.675b_residential1 terminal=1
new object=monitor.load.675c_residential1 element=load.675c_residential1 terminal=1
new object=monitor.load.611_runway element=load.611_runway terminal=1
new object=monitor.load.652_residential element=load.652_residential terminal=1
new object=monitor.load.670a_residential2 element=load.670a_residential2 terminal=1
new object=monitor.load.670b_residential2 element=load.670b_residential2 terminal=1
new object=monitor.load.670c_residential2 element=load.670c_residential2 terminal=1
new object=monitor.vsource.source element=vsource.source terminal=1 mode=1
new object=monitor.vsource.secondsource element=vsource.secondsource terminal=1 mode=1
solve mode=yearly
export monitors load.670c_residential2
export monitors load.670b_residential2
export monitors load.670a_residential2
export monitors load.652_residential
export monitors load.611_runway
export monitors load.675c_residential1
export monitors load.675b_residential1
export monitors load.675a_hospital
export monitors load.692_warehouse2
export monitors load.646_office
export monitors load.645_hangar
export monitors load.634c_atc_tower
export monitors load.634b_radar
export monitors load.634a_data_center
export monitors load.671_command_center
export monitors vsource.secondsource
export monitors vsource.source
export monitors m1
